kJ := 1000 J
Apples := 5*J/(kg*K)
Grapes := 11.2 K = -261.95 °C
Fruit := Apples*Grapes = 56 J/kg
What := 10*kJ = 10000 J
Δs == 5*J/(kg*K) - apples → Δs == 5*J/(K*kg) - apples
Δs := 5*J/(kg*K) - Apples = 0 m^2/(K*s^2)
Apples_2 == Fruit → Apples_2 == 56*m^2/s^2
Δs_all == s_2 - s_1
Δs_all := s_2 - s_1  # error: This variable is undefined.
