F == (k*q_1*q_2)/r^2
k := 8.988*10^9*N*m^2/C^2
E == k*q/r^3*vectorize(r)
integral(vectorize(E), A) == Q_enclosed/ε_0
U == k*q_1*q_2/r
V == k*q/r
V_a - V_b == integral(vectorize(E), vectorize(A) = a .. b)
vectorize(E) == -∇(V)
